// SBML level 2 version 3

function kl_0(Ki_Value, pH_of_Experiment)
  NaN;
end

function kl_1(Ki_Value)
  NaN;
end

function kl_2(Ki_Value, Temperature_of_Experiment)
  NaN;
end

function kl_3(Ki_Value, pH_of_Experiment, Temperature_of_Experiment)
  NaN;
end

function kl_4(Ki_Value)
  NaN;
end

function kl_5(Ki_Value, pH_of_Experiment, Temperature_of_Experiment)
  NaN;
end

model BRENDA_Mycobacterium_tuberculosis()
  // The SBML-model at hand is based on the BRENDA Enzyme-Database: http://www.brenda-enzymes.org

  // Compartments:
  compartment undefined = 1;

  // Species:
  species spec_ATRANS23DEHYDROACYLACYLCARRIERPROTEIN in undefined; spec_ATRANS23DEHYDROACYLACYLCARRIERPROTEIN is "a trans-2,3-dehydroacyl-[acyl-carrier protein]";
  species spec_NADH in undefined;
  species spec_Hplus in undefined; spec_Hplus is "H+";
  species spec_ANACYLACYLCARRIERPROTEIN in undefined; spec_ANACYLACYLCARRIERPROTEIN is "an acyl-[acyl-carrier protein]";
  species spec_NADplus in undefined; spec_NADplus is "NAD+";
  species enz_EC_1_3_1_9 in undefined; enz_EC_1_3_1_9 is "enoyl-[acyl-carrier-protein] reductase (NADH)";
  species inh_2OTOLYLOXY5HEXYLPHENOL in undefined; inh_2OTOLYLOXY5HEXYLPHENOL is "2-(o-tolyloxy)-5-hexylphenol";
  species spec_78DIHYDROFOLATE in undefined; spec_78DIHYDROFOLATE is "7,8-dihydrofolate";
  species spec_5678TETRAHYDROFOLATE in undefined; spec_5678TETRAHYDROFOLATE is "5,6,7,8-tetrahydrofolate";
  species enz_EC_1_5_1_3 in undefined; enz_EC_1_5_1_3 is "dihydrofolate reductase";
  species inh_ISONIAZID in undefined; inh_ISONIAZID is "Isoniazid";
  species spec_510METHYLENE5678TETRAHYDROFOLATE in undefined; spec_510METHYLENE5678TETRAHYDROFOLATE is "5,10-methylene-5,6,7,8-tetrahydrofolate";
  species spec_DUMP in undefined; spec_DUMP is "dUMP";
  species spec_DTMP in undefined; spec_DTMP is "dTMP";
  species enz_EC_2_1_1_45 in undefined; enz_EC_2_1_1_45 is "thymidylate synthase";
  species inh_5FLUORO2DEOXYURIDINE5MONOPHOSPHATE in undefined; inh_5FLUORO2DEOXYURIDINE5MONOPHOSPHATE is "5-fluoro-2'-deoxyuridine 5'-monophosphate";
  species spec_S16FLUORO2METHYL34DIHYDROQUINOLIN12HYL2ISOQUINOLIN5YLOXYETHANONE in undefined; spec_S16FLUORO2METHYL34DIHYDROQUINOLIN12HYL2ISOQUINOLIN5YLOXYETHANONE is "(S)-1-(6-fluoro-2-methyl-3,4-dihydroquinolin-1(2H)-yl)-2-(isoquinolin-5-yloxy)ethanone";
  species spec_H2O in undefined;
  species spec_2S6FLUORO2METHYL1234TETRAHYDROQUINOLINE in undefined; spec_2S6FLUORO2METHYL1234TETRAHYDROQUINOLINE is "(2S)-6-fluoro-2-methyl-1,2,3,4-tetrahydroquinoline";
  species spec_ISOQUINOLIN5YLOXYACETICACID in undefined; spec_ISOQUINOLIN5YLOXYACETICACID is "(isoquinolin-5-yloxy)acetic acid";
  species enz_EC_3_1_1_1 in undefined; enz_EC_3_1_1_1 is "carboxylesterase";
  species inh_DIETHYL4NITROPHENYLPHOSPHATE in undefined; inh_DIETHYL4NITROPHENYLPHOSPHATE is "diethyl 4-nitrophenyl phosphate";
  species spec_ATP in undefined;
  species spec_ADP in undefined;
  species spec_DTDP in undefined; spec_DTDP is "dTDP";
  species enz_EC_2_7_4_9 in undefined; enz_EC_2_7_4_9 is "dTMP kinase";
  species inh_12E456BISHYDROXYMETHYL2OXOBENZOCDINDOL12HYLBUT2EN1YL5METHYLPYRIMIDINE241H3HDIONE in undefined; inh_12E456BISHYDROXYMETHYL2OXOBENZOCDINDOL12HYLBUT2EN1YL5METHYLPYRIMIDINE241H3HDIONE is "1-[(2E)-4-[5,6-bis(hydroxymethyl)-2-oxobenzo[cd]indol-1(2H)-yl]but-2-en-1-yl]-5-methylpyrimidine-2,4(1H,3H)-dione";
  species inh_12E456DIMETHOXY1OXO13DIHYDRO2HISOINDOL2YLBUT2EN1YL5METHYLPYRIMIDINE241H3HDIONE in undefined; inh_12E456DIMETHOXY1OXO13DIHYDRO2HISOINDOL2YLBUT2EN1YL5METHYLPYRIMIDINE241H3HDIONE is "1-[(2E)-4-(5,6-dimethoxy-1-oxo-1,3-dihydro-2H-isoindol-2-yl)but-2-en-1-yl]-5-methylpyrimidine-2,4(1H,3H)-dione";
  species inh_5METHOXY22E45METHYL24DIOXO34DIHYDROPYRIMIDIN12HYLBUT2EN1YL1HISOINDOLE132HDIONE in undefined; inh_5METHOXY22E45METHYL24DIOXO34DIHYDROPYRIMIDIN12HYLBUT2EN1YL1HISOINDOLE132HDIONE is "5-methoxy-2-[(2E)-4-(5-methyl-2,4-dioxo-3,4-dihydropyrimidin-1(2H)-yl)but-2-en-1-yl]-1H-isoindole-1,3(2H)-dione";
  species spec_1DEOXYLGLYCEROTETRULOSE4PHOSPHATE in undefined; spec_1DEOXYLGLYCEROTETRULOSE4PHOSPHATE is "1-deoxy-L-glycero-tetrulose 4-phosphate";
  species spec_5AMINO6DRIBITYLAMINOURACIL in undefined; spec_5AMINO6DRIBITYLAMINOURACIL is "5-amino-6-(D-ribitylamino)uracil";
  species spec_67DIMETHYL8DRIBITYLLUMAZINE in undefined; spec_67DIMETHYL8DRIBITYLLUMAZINE is "6,7-dimethyl-8-(D-ribityl)lumazine";
  species spec_2H2O in undefined; spec_2H2O is "2 H2O";
  species spec_PHOSPHATE in undefined; spec_PHOSPHATE is "phosphate";
  species enz_EC_2_5_1_78 in undefined; enz_EC_2_5_1_78 is "6,7-dimethyl-8-ribityllumazine synthase";
  species inh_1DEOXY1268TRIOXO74PHOSPHONOOXYBUTYL123678HEXAHYDRO9HPURIN9YLDRIBITOL in undefined; inh_1DEOXY1268TRIOXO74PHOSPHONOOXYBUTYL123678HEXAHYDRO9HPURIN9YLDRIBITOL is "1-deoxy-1-[2,6,8-trioxo-7-[4-(phosphonooxy)butyl]-1,2,3,6,7,8-hexahydro-9H-purin-9-yl]-D-ribitol";
  species inh_446DIOXO4567TETRAHYDRO1DRIBITYL1HPYRAZOLO34DPYRIMIDIN3YLBUTYL1PHOSPHATE in undefined; inh_446DIOXO4567TETRAHYDRO1DRIBITYL1HPYRAZOLO34DPYRIMIDIN3YLBUTYL1PHOSPHATE is "4-[4,6-dioxo-4,5,6,7-tetrahydro1-D-ribityl-1H-pyrazolo[3,4-d]-pyrimidin-3-yl]butyl 1-phosphate";
  species inh_1DEOXY1268TRIOXO75PHOSPHONOOXYPENTYL123678HEXAHYDRO9HPURIN9YLDRIBITOL in undefined; inh_1DEOXY1268TRIOXO75PHOSPHONOOXYPENTYL123678HEXAHYDRO9HPURIN9YLDRIBITOL is "1-deoxy-1-[2,6,8-trioxo-7-[5-(phosphonooxy)pentyl]-1,2,3,6,7,8-hexahydro-9H-purin-9-yl]-D-ribitol";

  // Reactions:
  reaction_438122: spec_ATRANS23DEHYDROACYLACYLCARRIERPROTEIN + spec_NADH + spec_Hplus -> spec_ANACYLACYLCARRIERPROTEIN + spec_NADplus; kl_0(Ki_Value_2OTOLYLOXY5HEXYLPHENOL_712422_1, pH_of_Experiment__712422_1); reaction_438122 is "reaction_438122_enoyl-[acyl-carrier-protein] reductase (NADH)";  // modifiers: enz_EC_1_3_1_9, inh_2OTOLYLOXY5HEXYLPHENOL
    Ki_Value_2OTOLYLOXY5HEXYLPHENOL_712422_1 = 0.000000022 mM; pH_of_Experiment__712422_1 = 6.8 dimensionless;
  reaction_424618: spec_78DIHYDROFOLATE + spec_NADH + spec_Hplus -> spec_5678TETRAHYDROFOLATE + spec_NADplus; kl_1(Ki_Value_ISONIAZID_676136_2); reaction_424618 is "reaction_424618_dihydrofolate reductase";  // modifiers: enz_EC_1_5_1_3, inh_ISONIAZID
    Ki_Value_ISONIAZID_676136_2 = 0.000001 mM;
  reaction_319728: spec_510METHYLENE5678TETRAHYDROFOLATE + spec_DUMP -> spec_78DIHYDROFOLATE + spec_DTMP; kl_2(Ki_Value_5FLUORO2DEOXYURIDINE5MONOPHOSPHATE_694812_3, Temperature_of_Experiment__694812_3); reaction_319728 is "reaction_319728_thymidylate synthase";  // modifiers: enz_EC_2_1_1_45, inh_5FLUORO2DEOXYURIDINE5MONOPHOSPHATE
    Ki_Value_5FLUORO2DEOXYURIDINE5MONOPHOSPHATE_694812_3 = 0.000002 mM; Temperature_of_Experiment__694812_3 = 22 degreecelsius;
  reaction_410676_carboxylesterase: spec_S16FLUORO2METHYL34DIHYDROQUINOLIN12HYL2ISOQUINOLIN5YLOXYETHANONE + spec_H2O -> spec_2S6FLUORO2METHYL1234TETRAHYDROQUINOLINE + spec_ISOQUINOLIN5YLOXYACETICACID; kl_3(Ki_Value_DIETHYL4NITROPHENYLPHOSPHATE_668463_4, pH_of_Experiment__668463_4, Temperature_of_Experiment__668463_4);  // modifiers: enz_EC_3_1_1_1, inh_DIETHYL4NITROPHENYLPHOSPHATE
    Ki_Value_DIETHYL4NITROPHENYLPHOSPHATE_668463_4 = 0.000003 mM; pH_of_Experiment__668463_4 = 7 dimensionless; Temperature_of_Experiment__668463_4 = 25 degreecelsius;
  reaction_358191_dTMP_kinase: spec_ATP + spec_DTMP -> spec_ADP + spec_DTDP; kl_4(Ki_Value_12E456BISHYDROXYMETHYL2OXOBENZOCDINDOL12HYLBUT2EN1YL5METHYLPYRIMIDINE241H3HDIONE_739640_5, Ki_Value_12E456DIMETHOXY1OXO13DIHYDRO2HISOINDOL2YLBUT2EN1YL5METHYLPYRIMIDINE241H3HDIONE_739640_6, Ki_Value_5METHOXY22E45METHYL24DIOXO34DIHYDROPYRIMIDIN12HYLBUT2EN1YL1HISOINDOLE132HDIONE_739640_7);  // modifiers: enz_EC_2_7_4_9, inh_12E456BISHYDROXYMETHYL2OXOBENZOCDINDOL12HYLBUT2EN1YL5METHYLPYRIMIDINE241H3HDIONE
    Ki_Value_12E456BISHYDROXYMETHYL2OXOBENZOCDINDOL12HYLBUT2EN1YL5METHYLPYRIMIDINE241H3HDIONE_739640_5 = 0.000004 mM; Ki_Value_12E456DIMETHOXY1OXO13DIHYDRO2HISOINDOL2YLBUT2EN1YL5METHYLPYRIMIDINE241H3HDIONE_739640_6 = 0.000004 mM; Ki_Value_5METHOXY22E45METHYL24DIOXO34DIHYDROPYRIMIDIN12HYLBUT2EN1YL1HISOINDOLE132HDIONE_739640_7 = 0.000004 mM;
  reaction_436231: spec_1DEOXYLGLYCEROTETRULOSE4PHOSPHATE + spec_5AMINO6DRIBITYLAMINOURACIL -> spec_67DIMETHYL8DRIBITYLLUMAZINE + spec_2H2O + spec_PHOSPHATE; kl_5(Ki_Value_1DEOXY1268TRIOXO74PHOSPHONOOXYBUTYL123678HEXAHYDRO9HPURIN9YLDRIBITOL_699719_8, pH_of_Experiment__699719_8, Temperature_of_Experiment__699719_8, Ki_Value_446DIOXO4567TETRAHYDRO1DRIBITYL1HPYRAZOLO34DPYRIMIDIN3YLBUTYL1PHOSPHATE_688576_9, pH_of_Experiment__688576_9, Temperature_of_Experiment__688576_9, Ki_Value_1DEOXY1268TRIOXO75PHOSPHONOOXYPENTYL123678HEXAHYDRO9HPURIN9YLDRIBITOL_699719_10, pH_of_Experiment__699719_10, Temperature_of_Experiment__699719_10); reaction_436231 is "reaction_436231_6,7-dimethyl-8-ribityllumazine synthase";  // modifiers: enz_EC_2_5_1_78, inh_1DEOXY1268TRIOXO74PHOSPHONOOXYBUTYL123678HEXAHYDRO9HPURIN9YLDRIBITOL
    Ki_Value_1DEOXY1268TRIOXO74PHOSPHONOOXYBUTYL123678HEXAHYDRO9HPURIN9YLDRIBITOL_699719_8 = 0.0000041 mM; pH_of_Experiment__699719_8 = 7 dimensionless; Temperature_of_Experiment__699719_8 = 37 degreecelsius; Ki_Value_446DIOXO4567TETRAHYDRO1DRIBITYL1HPYRAZOLO34DPYRIMIDIN3YLBUTYL1PHOSPHATE_688576_9 = 0.0000041 mM; pH_of_Experiment__688576_9 = 7 dimensionless; Temperature_of_Experiment__688576_9 = 27 degreecelsius; Ki_Value_1DEOXY1268TRIOXO75PHOSPHONOOXYPENTYL123678HEXAHYDRO9HPURIN9YLDRIBITOL_699719_10 = 0.0000047 mM; pH_of_Experiment__699719_10 = 7 dimensionless; Temperature_of_Experiment__699719_10 = 37 degreecelsius;

  // Unit definitions:
  unit mM = 1e-3 mole / litre;
  unit onepers = 1 / second;
  unit degreecelsius = kelvin;
end
